<?xml version="1.0"?>
<?xml-stylesheet type="text/xsl" href="http://jsbsim.sourceforge.net/JSBSim.xsl"?>
<fdm_config name="General Dynamics F-16A" version="2.0" release="PRODUCTION"
 xmlns:xsi="http://www.w3.org/2001/XMLSchema-instance"
 xsi:noNamespaceSchemaLocation="http://jsbsim.sourceforge.net/JSBSim.xsd">

 <fileheader>
  <author> Gustum </author>
  <email> wnn@qq.com </email>
  <organization> Jiaotong </organization>
  <fileCreationDate> 2022-03-04 </fileCreationDate>
  <version> 1.0 </version>
  <license>
   <licenseName> licenseName </licenseName>
   <licenseURL> https://www.baidu.html </licenseURL>
  </license>
  <note> Wow! </note>
  <reference refID="4" author="wnn" title="Titl" date="n/a"/>
  <reference refID="None" author="wnn2" title="ti2" date="2022/2/23"/>
 </fileheader>

 <metrics>
  <wingarea unit="FT2"> 174 </wingarea>
  <wingspan unit="FT2"> 35.8 </wingspan>
  <chord unit="FT2"> 4.9 </chord>
  <htailarea unit="FT2"> 21.9 </htailarea>
  <htailarm unit="FT2"> 15.7 </htailarm>
  <vtailarea unit="FT2"> 16.5 </vtailarea>
  <vtailarm unit="FT2"> 15.7 </vtailarm>
  <location name="AERORP" unit="IN">
   <x> 43.2 </x>
   <y> 0.0 </y>
   <z> 59.4 </z>
  </location>
  <location name="EVEPOINT" unit="IN">
   <x> 37.0 </x>
   <y> 0.0 </y>
   <z> 48.0 </z>
  </location>
  <location name="VRP" unit="IN">
   <x> 42.6 </x>
   <y> 0.0 </y>
   <z> 38.5 </z>
  </location>
 </metrics>

 <mass_balance negated_crossproduct_inertia="true">
  <ixx unit="SLUG*FT2"> 9496 </ixx>
  <iyy unit="SLUG*FT2"> 55814 </iyy>
  <izz unit="SLUG*FT2"> 63100 </izz>
  <ixy unit="SLUG*FT2"> 0 </ixy>
  <ixz unit="SLUG*FT2"> -982 </ixz>
  <iyz unit="SLUG*FT2"> 0 </iyz>
  <emptywt unit="LBS"> 17400 </emptywt>
  <location name="CG" unit="IN">
   <x> -193 </x>
   <y> 0 </y>
   <z> -5.1 </z>
  </location>
  <pointmass name="Pilot">
   <weight unit="LBS"> 230 </weight>
   <location name="POINTMASS" unit="IN">
    <x> -336.2 </x>
    <y> 0 </y>
    <z> 0 </z>
   </location>
  </pointmass>
 </mass_balance>

</fdm_config>
